// SBML level 3 version 1

function Function_for_J0(Keq1, S1, S4, VM1, X0, default_compartment, h)
  VM1*(X0 - S1/Keq1)/(1 + X0 + S1 + S4^h)/default_compartment;
end

function Function_for_J1(S1, S2, default_compartment)
  (10*S1 - 2*S2)/(1 + S1 + S2)/default_compartment;
end

function Function_for_J2(S2, S3, default_compartment)
  (5*S2 - 2*S3)/(1 + S2 + S3)/default_compartment;
end

function Function_for_J3(S3, S4, default_compartment)
  (10*S3 - 2*S4)/(1 + S3 + S4)/default_compartment;
end

function Function_for_J4(KS4, S4, V4, default_compartment)
  V4*S4/(KS4 + S4)/default_compartment;
end

model feedback_GlobalRender()
  // NoName
  // model units - substance: substance, time: time, volume: volume, area: area, length: length, extent: substance

  // Compartments:
  compartment default_compartment = 1 volume;  // SBO:0000410

  // Species:
  species $X0 in default_compartment = 10;
  species S1 in default_compartment = 0;
  species S4 in default_compartment = 0;
  species S2 in default_compartment = 0;
  species S3 in default_compartment = 0;
  species $X1 in default_compartment = 0;

  // Parameters:
  VM1 = 10;
  h = 10;
  V4 = 2.5;
  KS4 = 0.5;

  // Assignment rules:
  Keq1 := S2*5 + 5;

  // Reactions:
  J0: $X0 -> S1; default_compartment*Function_for_J0(Keq1, S1, S4, VM1, X0, default_compartment, h);  // modifiers: S4
  J1: S1 -> S2; default_compartment*Function_for_J1(S1, S2, default_compartment);
  J2: S2 -> S3; default_compartment*Function_for_J2(S2, S3, default_compartment);
  J3: S3 -> S4; default_compartment*Function_for_J3(S3, S4, default_compartment);
  J4: S4 -> $X1; default_compartment*Function_for_J4(KS4, S4, V4, default_compartment);

  // Unit definitions:
  unit length = metre;
  unit area = metre^2;
  unit volume = litre;
  unit time = second;
  unit substance = mole;
end
