// SBML level 3 version 1

function Function_for_J2(J2_J2_k, Node2, compartment)
  J2_J2_k*Node2/compartment;
end

function Function_for_J0(J0_k, Node0, compartment)
  J0_k*Node0/compartment;
end

function Function_for_J3(J3_J3_k, Node3, compartment)
  J3_J3_k*Node3/compartment;
end

function Function_for_J1(J1_J1_k, Node1, compartment)
  J1_J1_k*Node1/compartment;
end

model LinearChain()
  // Simple Linear Pathway
  // model units - substance: substance, time: time, volume: volume, area: area, length: length, extent: substance

  // Compartments:
  compartment compartment = 1 volume;

  // Species:
  species Node1 in compartment = 0;
  species Node2 in compartment = 0;
  species Node3 in compartment = 0;
  species $Node0 in compartment = 10;
  species $Node4 in compartment = 0;

  // Parameters:
  J0_J0_k = 0.1;
  J1_J1_k = 0.1;
  J2_J2_k = 0.1;
  J3_J3_k = 0.1;
  J1_k = 0.1;
  J2_k = 0.1;
  J3_k = 0.1;
  J0_k = 1;

  // Reactions:
  J0: $Node0 => Node1; compartment*Function_for_J0(J0_k, Node0, compartment);
  J1: Node1 => Node2; compartment*Function_for_J1(J1_J1_k, Node1, compartment);
  J2: Node2 => Node3; compartment*Function_for_J2(J2_J2_k, Node2, compartment);
  J3: Node3 => $Node4; compartment*Function_for_J3(J3_J3_k, Node3, compartment);

  // Unit definitions:
  unit length = metre;
  unit area = metre^2;
  unit volume = litre;
  unit time = second;
  unit substance = mole;
end
